a := 0.5
Radius := 0.2
q1 := 0, 0.1 .. 2*π
l1 := 0.2
alpha0 := asin(l1/a)
l_3 := 0.8
xcpr(q1) := -Radius/sqrt(1 - (l1*cos(q1))^2/(l1^2 + 2*l1*a*sin(q1) + a^2))*(-1/2*cos(q1)*2*l1*l1*cos(q1)/(l1^2 + 2*l1*a*sin(q1) + a^2)*a/sqrt(l1^2 + 2*l1*a*sin(q1) + a^2) + (-sin(q1)*l1*sqrt(l1^2 + 2*l1*a*sin(q1) + a^2)/(l1^2 + 2*l1*a*sin(q1) + a^2)))
phi3(q1) := acos(l1*cos(q1)/sqrt(l1^2 + 2*l1*sin(q1)*a + a^2))
alpha(q1) := phi3(q1) - π/2
U(q1) := sqrt(l1^2 + a^2 + 2*a*l1*sin(q1))
xc(q1) := (alpha0 + alpha(q1))*Radius
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phi3'(q1) := l1*cos(phi3(q1) - q1)/U(q1)
dU(q1) := d/dq1(U(q1))
dxc(q1) := d/dq1(xc(q1))
U'(q1) := l1*sin(phi3(q1) - q1)
dphi3(q1) := d/dq1(phi3(q1))
xc'(q1) := phi3'(q1)*Radius
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A1(q1) := -l1*cos(q1) + sin(phi3(q1))*phi3'(q1)*U'(q1) + cos(phi3(q1))*phi3'(q1)^2*U(q1) + U'(q1)*sin(phi3(q1))*phi3'(q1)
A2(q1) := -sin(q1)*l1 - cos(phi3(q1))*phi3'(q1)*U'(q1) + sin(phi3(q1))*phi3'(q1)^2*U(q1) - U'(q1)*cos(phi3(q1))*phi3'(q1)
phi3''(q1) := det([cos(phi3(q1)), A1(q1); sin(phi3(q1)), A2(q1)])/det([cos(phi3(q1)), -sin(phi3(q1))*U(q1); sin(phi3(q1)), cos(phi3(q1))*U(q1)])
U''(q1) := det([A1(q1), -sin(phi3(q1))*U(q1); A2(q1), cos(phi3(q1))*U(q1)])/det([cos(phi3(q1)), -sin(phi3(q1))*U(q1); sin(phi3(q1)), cos(phi3(q1))*U(q1)])
xc''(q1) := phi3''(q1)*Radius
ddx(q1) := phi3''(q1)*Radius
ddU(q1) := d/dq1(dU(q1))
ddphi3(q1) := d/dq1(dphi3(q1))
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q11 := 3.5
q_min := root(xc'(q11), q11)
q_min = 3.55311
q11 := 5.98
q_max := root(xc'(q11), q11)
q_max = 5.87167
H11 := -xc(q_max) + xc(q_min)
H11 = 0.164607
S1(q1) := -xc(q_max) + xc(q1)
H11 := 0.165
Given
700 == H11^2*AA + H11*B
1000 == 0.49*H11^2*AA + 0.7*B*H11
Find(AA, B) → [-89203.7255674; 18961.038961]
[AA; B] := [-89203.7255674; 18961.038961]
P(q1) :=
    AA*S1(q1)^2 + B*S1(q1) if 0 ≤ S1(q1) ≤ H11 and xc'(q1) ≥ 0
    0 otherwise
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P(q1) := -{
    AA*S1(q1)^2 + B*S1(q1) if 0 ≤ S1(q1) ≤ H11 and xc'(q1) ≥ 0
    0 otherwise
}
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ρ := 50
m_1 := l1*ρ
m_2 := 3*m_1
g := 9.81
m_U(q1) := l_3*ρ
m_BC := Radius*ρ
m_duga := π*ρ
m_3(q1) := m_U(q1) + m_BC + m_duga
m_4 := m_duga
m_3(q1) := m_U(q1) + m_BC + m_duga
G_1 := m_1*g
G_2 := m_2*g
G_3(q1) := m_3(q1)*g
G_4 := m_4*g = 1540.95
xb := -a
x_1(q1) := cos(q1)*l1/2
y_1(q1) := sin(q1)*l1/2
y_2(q1) := sin(q1)*l1
x_2(q1) := cos(q1)*l1
x_U(q1) := cos(phi3(q1))*l_3/2
y_U(q1) := -a + sin(phi3(q1))*l_3/2
x_BC(q1) := -cos(phi3(q1))*Radius/2
y_BC(q1) := -sin(phi3(q1))*Radius/2 - a
y_duga(q1) := -sin(phi3(q1))*(4*Radius/(3*π)) - a
x_duga(q1) := -cos(phi3(q1))*(4*Radius/(3*π))
x_3(q1) := (x_U(q1)*m_U(q1) + x_BC(q1)*m_BC + x_duga(q1)*m_duga)/(m_U(q1) + m_BC + m_duga)
y_3(q1) := (y_U(q1)*m_U(q1) + y_BC(q1)*m_BC + y_duga(q1)*m_duga)/(m_U(q1) + m_BC + m_duga)
y_4 := -a - Radius
x_4(q1) := xc(q1)
J_1(q1) := m_1*l1^2/3
J_2 := 0
J_U(q1) := m_U(q1)*U(q1)^2/12
J_BC(q1) := m_BC*Radius^2/12
J_duga(q1) := m_duga*Radius^2/2 - (m_duga*(4*Radius/(3*π))^2)
J_3(q1) := J_U(q1) + m_U(q1)*((x_U(q1) - x_3(q1))^2 + (y_U(q1) - y_3(q1))^2) + J_BC(q1) + m_BC*((x_BC(q1) - x_3(q1))^2 + (y_BC(q1) - y_3(q1))^2) + J_duga(q1) + m_duga*((y_duga(q1) - y_3(q1))^2 + (x_duga(q1) - x_3(q1))^2)
J_4(q1) := m_4*π^2/12
F_1x := 0
F_1y := 0
M_1 := 0
ω_1 := 15
ε_1 := 0
F_2x(q1) := -m_2*ω_1^2*d^2/dq1^2(x_2(q1))
F_2y(q1) := -m_2*ω_1^2*d^2/dq1^2(y_2(q1))
M_2 := 0
F_3x(q1) := -m_3(q1)*ω_1^2*d^2/dq1^2(x_3(q1))
F_3y(q1) := -m_3(q1)*ω_1^2*d^2/dq1^2(y_3(q1))
M_3(q1) := -J_3(q1)*ω_1^2*d^2/dq1^2(phi3(q1))
F_3x(q1) := 0  # disabled
G_3(q1) := 0  # disabled
F_4x(q1) := -m_4*ω_1^2*d^2/dq1^2(x_4(q1))
F_4y(q1) := 0
F_3y(q1) := 0  # disabled
M_4(q1) := 0
F_4x(q1) = [
    -1765.04; -1537.26; -1338.07; -1163.59; -1010.23; -874.83; -754.617; -647.172; -550.403; -462.493
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]
M_3(q1) := 0  # disabled
M_04 == 0
F_4x(q1) + P(q1) + R_34t(q1) == 0
R_34t == -F_4x(q1) - P(q1) == -R_43t
R_43t(q1) == F_4x + P(q1)
R_04y - R_34n - G_4 == 0
R_43t(q1) := -F_4x(q1) - P(q1)
R_43n(q1) := R_43t(q1)*tan(20 deg)
M_32(q1) == M_23(q1) == 0
F_2x(q1) + R_12x(q1) - R_32(q1)*cos(π/2 - phi3(q1)) == 0
R_12y(q1) + F_2y(q1) - G_2 + R_32*sin(π/2 - phi3(q1)) == 0
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-R_23(q1)*U(q1) - F_3x*(y_3(q1) + a) + M_3(q1) + (F_3y(q1) - G_3(q1))*x_3(q1) - R_43t(q1)*Radius == 0
Q == R_12x(q1)*sin(q1)*l1 - R_12y(q1)*cos(q1)*l1
R_23(q1) := (-F_3x(q1)*(y_3(q1) + a) + M_3(q1) + (F_3y(q1) - G_3(q1))*x_3(q1) - R_43t(q1)*Radius)/U(q1)
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R_12x(q1) := R_23(q1)*cos(π/2 - phi3(q1)) - F_2x(q1)
R_12y(q1) := (G_2 - F_2y(q1)) - R_23(q1)*sin(π/2 - phi3(q1))
x_A(q1) := l1*cos(q1)
y_A(q1) := l1*sin(q1)
Q(q1) := -R_12x(q1)*y_A(q1) + R_12y(q1)*x_A(q1)
x'_A(q1) := d/dq1(l1*cos(q1))
y'_A(q1) := d/dq1(l1*sin(q1))
Q_1(q1) := -(M_3(q1)*phi3'(q1) + F_2x(q1)*x'_A(q1) + (F_2y(q1) - G_2)*y'_A(q1) + F_3x(q1)*(d/dq1(x_3(q1))) + (F_3y(q1) - G_3(q1))*(d/dq1(y_3(q1))) + F_4x(q1)*(d/dq1(x_4(q1))) + P(q1)*xc'(q1))
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M_3(q1)*phi3'(q1) = [
    -82.362; -84.3873; -83.213; -79.8802; -75.1287; -69.4771; -63.2833; -56.7901; -50.1576; -43.4879
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]
F_3x(q1)*(d/dq1(x_3(q1))) + (F_3y(q1) - G_3(q1))*(d/dq1(y_3(q1))) = [
    -0.941501; -1.04822; -1.11705; -1.15236; -1.15812; -1.13793; -1.09503; -1.03235; -0.952546; -0.85806
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]
G_3(q1)*(d/dq1(y_3(q1))) = [
    0.83755; 0.942379; 1.01332; 1.05337; 1.06556; 1.0528; 1.01789; 0.963458; 0.891967; 0.805744
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]
