a := 0.5
Radius := 0.2
q1 := 0, 0.1 .. 2*π
l1 := 0.2
alpha0 := asin(l1/a)
l_3 := 0.8
xcpr(q1) := -Radius/sqrt(1 - (l1*cos(q1))^2/(l1^2 + 2*l1*a*sin(q1) + a^2))*(-1/2*cos(q1)*2*l1*l1*cos(q1)/(l1^2 + 2*l1*a*sin(q1) + a^2)*a/sqrt(l1^2 + 2*l1*a*sin(q1) + a^2) + (-sin(q1)*l1*sqrt(l1^2 + 2*l1*a*sin(q1) + a^2)/(l1^2 + 2*l1*a*sin(q1) + a^2)))
phi3(q1) := acos(l1*cos(q1)/sqrt(l1^2 + 2*l1*sin(q1)*a + a^2))
alpha(q1) := phi3(q1) - π/2
U(q1) := sqrt(l1^2 + a^2 + 2*a*l1*sin(q1))
xc(q1) := (alpha0 + alpha(q1))*Radius
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phi3'(q1) := l1*cos(phi3(q1) - q1)/U(q1)
dU(q1) := d/dq1(U(q1))
dxc(q1) := d/dq1(xc(q1))
U'(q1) := l1*sin(phi3(q1) - q1)
dphi3(q1) := d/dq1(phi3(q1))
xc'(q1) := phi3'(q1)*Radius
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A1(q1) := -l1*cos(q1) + sin(phi3(q1))*phi3'(q1)*U'(q1) + cos(phi3(q1))*phi3'(q1)^2*U(q1) + U'(q1)*sin(phi3(q1))*phi3'(q1)
A2(q1) := -sin(q1)*l1 - cos(phi3(q1))*phi3'(q1)*U'(q1) + sin(phi3(q1))*phi3'(q1)^2*U(q1) - U'(q1)*cos(phi3(q1))*phi3'(q1)
phi3''(q1) := det([cos(phi3(q1)), A1(q1); sin(phi3(q1)), A2(q1)])/det([cos(phi3(q1)), -sin(phi3(q1))*U(q1); sin(phi3(q1)), cos(phi3(q1))*U(q1)])
U''(q1) := det([A1(q1), -sin(phi3(q1))*U(q1); A2(q1), cos(phi3(q1))*U(q1)])/det([cos(phi3(q1)), -sin(phi3(q1))*U(q1); sin(phi3(q1)), cos(phi3(q1))*U(q1)])
xc''(q1) := phi3''(q1)*Radius
ddx(q1) := phi3''(q1)*Radius
ddU(q1) := d/dq1(dU(q1))
ddphi3(q1) := d/dq1(dphi3(q1))
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q11 := 3.5
q_min := root(xc'(q11), q11)
q_min = 3.55311
q11 := 5.98
q_max := root(xc'(q11), q11)
q_max = 5.87167
H11 := |xc(q_max) - xc(q_min)|
H11 = 0.164607
S1(q1) := xc(q1) - xc(q_max)
H11 := 0.165
Given
700 == H11^2*AA + H11*B
1000 == 0.49*H11^2*AA + 0.7*B*H11
Find(AA, B) → [-89203.7255674; 18961.038961]
[AA; B] := [-89203.7255674; 18961.038961]
P(q1) := -{
    AA*S1(q1)^2 + B*S1(q1) if 0 ≤ S1(q1) ≤ H11 and xc'(q1) ≥ 0
    0 otherwise
}
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ρ := 50
m_1 := l1*ρ
g := 9.81
m_2 := 3*m_1
m_U(q1) := l_3*ρ
G_1 := m_1*g
m_BC := Radius*ρ
G_2 := m_2*g
m_duga := π*ρ
m_3(q1) := m_U(q1) + m_BC + m_duga
G_3(q1) := m_3(q1)*g
m_4 := m_duga
G_4 := m_4*g
x_1(q1) := cos(q1)*l1/2
y_1(q1) := sin(q1)*l1/2
y_2(q1) := sin(q1)*l1
x_2(q1) := cos(q1)*l1
x_U(q1) := cos(phi3(q1))*l_3/2
y_U(q1) := -a + sin(phi3(q1))*l_3/2
x_BC(q1) := -cos(phi3(q1))*Radius/2
y_BC(q1) := -sin(phi3(q1))*Radius/2 - a
y_duga(q1) := -sin(phi3(q1))*(4*Radius/(3*π)) - a
x_duga(q1) := -cos(phi3(q1))*(4*Radius/(3*π))
x_3(q1) := (x_U(q1)*m_U(q1) + x_BC(q1)*m_BC + x_duga(q1)*m_duga)/(m_U(q1) + m_BC + m_duga)
y_3(q1) := (y_U(q1)*m_U(q1) + y_BC(q1)*m_BC + y_duga(q1)*m_duga)/(m_U(q1) + m_BC + m_duga)
y_4 := -a - Radius
x_4(q1) := xc(q1)
J_1(q1) := m_1*l1^2/3
J_2 := 0
J_U(q1) := m_U(q1)*U(q1)^2/12
J_BC(q1) := m_BC*Radius^2/12
J_duga(q1) := m_duga*Radius^2/2 - (m_duga*(4*Radius/(3*π))^2)
J_3(q1) := J_U(q1) + m_U(q1)*((x_U(q1) - x_3(q1))^2 + (y_U(q1) - y_3(q1))^2) + J_BC(q1) + m_BC*((x_BC(q1) - x_3(q1))^2 + (y_BC(q1) - y_3(q1))^2) + J_duga(q1) + m_duga*((y_duga(q1) - y_3(q1))^2 + (x_duga(q1) - x_3(q1))^2)
J_4(q1) := m_4*π^2/12
F_1x := 0
F_1y := 0
M_1 := 0
ω_1 := 15
ε_1 := 0
F_2x(q1) := -m_2*ω_1^2*d^2/dq1^2(x_2(q1))
F_2y(q1) := -m_2*ω_1^2*d^2/dq1^2(y_2(q1))
M_2 := 0
F_3x(q1) := -m_3(q1)*ω_1^2*d^2/dq1^2(x_3(q1))
F_3y(q1) := -m_3(q1)*ω_1^2*d^2/dq1^2(y_3(q1))
M_3(q1) := -J_3(q1)*ω_1^2*d^2/dq1^2(phi3(q1))
F_4x(q1) := -m_4*ω_1^2*d^2/dq1^2(x_4(q1))
F_4y(q1) := 0
M_4(q1) := 0
M_04 == 0
F_4x + P + R_34t == 0
R_34*cos(20 deg) + F_4x + P == 0
R_34t(q1) == -F_4x - P
R_04y - R_34n - G_4 == 0
R_04y - R_34*sin(20 deg) - G_4 == 0
R_34t(q1) := -F_4x(q1) - P(q1)
R_34n(q1) := R_34t(q1)*tan(20 deg)
M_32(q1) == M_23(q1) == 0
F_2x(q1) + R_12x(q1) - R_32(q1)*cos(π/2 - phi3(q1)) == 0
R_12y(q1) + F_2y(q1) - G_2 + R_32*sin(π/2 - phi3(q1)) == 0
-R_23(q1)*U(q1) - F_3x*(y_3(q1) + a) + M_3(q1) + (F_3y(q1) - G_3(q1))*x_3(q1) - R_43t(q1)*Radius == 0
R_43t(q1) := R_34t(q1)
R_23(q1) := (-F_3x(q1)*(y_3(q1) + a) + M_3(q1) + (F_3y(q1) - G_3(q1))*x_3(q1) - R_43t(q1)*Radius)/U(q1)
R_32(q1) := R_23(q1)
R_12x(q1) := R_32(q1)*cos(π/2 - phi3(q1)) - F_2x(q1)
R_12y(q1) := G_2 - F_2y(q1) - R_32(q1)*sin(π/2 - phi3(q1))
Q == R_21x(q1)*sin(q1)*l1 - R_21y(q1)*cos(q1)*l1
x_A(q1) := l1*cos(q1)
y_A(q1) := l1*sin(q1)
R_21x(q1) := R_12x(q1)
R_21y(q1) := R_12y(q1)
Q(q1) := -(R_21x(q1)*y_A(q1)) + R_21y(q1)*x_A(q1)
x'_A(q1) := d/dq1(U(q1)*cos(phi3(q1)))
y'_A(q1) := d/dq1(U(q1)*sin(phi3(q1)))
Q_1(q1) := -(M_3(q1)*phi3'(q1) + F_2x(q1)*x'_A(q1) + (F_2y(q1) - G_2)*y'_A(q1) + F_3x(q1)*(d/dq1(x_3(q1))) + (F_3y(q1) - G_3(q1))*(d/dq1(y_3(q1))) + F_4x(q1)*(d/dq1(x_4(q1))) + P(q1)*xc'(q1))
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# Теперь у меня MathCad, в котором можно комментировать сделанное. Заключительный этап первого курсового проекта
# Здесь, справа, происходит отбрасывание индексов. Смысловой нагрузки нет
n := 60
ω := ω_1
Q1(q1) := Q_1(q1)
q := 0, 2*π/n .. 2*π - 2*π/n
J1(q) := m_1*l1^2/3
# 1. Выбрать двигатель. Рассчитать ndn, Mdn, s, i ...
Q(q) := -(R_21x(q)*y_A(q)) + R_21y(q)*x_A(q)
m2 := m_2
x2(q) := cos(q)*l1
y2(q) := sin(q)*l1
Nt := ω*sqrt(sum(Q(q)^2, q)/n)
Nt = 7604.13
m_U(q) := l_3*ρ
U(q) := sqrt(l1^2 + a^2 + 2*a*l1*sin(q))
# Типоразмер двигателя 2ПН200L
N := 11000
ndn := 800
I := 53
R := 0.125
Lя := 0.0046
Jp := 0.3
Ju(q) := m_U(q)*U(q)^2/12
x_U(q) := cos(phi3(q))*l_3/2
y_U(q) := -a + sin(phi3(q))*l_3/2
ωeng := ndn*2*π/60 = 83.7758
ωxx := ωeng*220/(220 - R*I) = 86.3769
Mdn := N/ωeng = 131.303
sd := Mdn/(ωxx - ωeng) = 50.4793
i := (ωeng/ω) = 5.58505
x_BC(q) := -cos(phi3(q))*Radius/2
y_BC(q) := -sin(phi3(q))*Radius/2 - a
s := sd*i^2 = 1574.59
y_duga(q) := -sin(phi3(q))*(4*Radius/(3*π)) - a
x_duga(q) := -cos(phi3(q))*(4*Radius/(3*π))
τ := Lя/R = 0.0368
Meng(ωeng) := s*ωxx - s*ωeng  # Не понимаю этого момента при неизменной скорости двигателя
dq := 0, 0.05 .. ωxx/Lя
Qs(dq) := i*s*ωxx - s*dq*i
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# 2. Определить приведённый момент инерции J(q)  построить график
x_3(q) := (x_U(q)*m_U(q) + x_BC(q)*m_BC + x_duga(q)*m_duga)/(m_U(q) + m_BC + m_duga)
y_3(q) := (y_U(q)*m_U(q) + y_BC(q)*m_BC + y_duga(q)*m_duga)/(m_U(q) + m_BC + m_duga)
Jpm(q) := 10*J1(q)
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J_duga(q) := m_duga*Radius^2/2 - (m_duga*(4*Radius/(3*π))^2)
J_BC(q) := m_BC*Radius^2/12
J3(q) := Ju(q) + m_U(q)*((x_U(q) - x_3(q))^2 + (y_U(q) - y_3(q))^2) + J_BC(q) + m_BC*((x_BC(q) - x_3(q))^2 + (y_BC(q) - y_3(q))^2) + J_duga(q) + m_duga*((y_duga(q) - y_3(q))^2 + (x_duga(q) - x_3(q))^2)
phi3(q) := acos(l1*cos(q)/sqrt(l1^2 + 2*l1*sin(q)*a + a^2))
m_3(q) := m_U(q) + m_BC + m_duga
x4(q) := xc(q)
y4(q) := -a - Radius
m4 := m_duga
G2(q) := m2*g
m3(q) := m_3(q)
xc(q) := (alpha0 + alpha(q))*Radius
G3(q) := m_3(q)*g
S1(q) := xc(q) - xc(q_max)
y3(q) := y_3(q)
xc'(q) := d/dq(xc(q))
x3(q) := x_3(q)
P(q) := -{
    AA*S1(q)^2 + B*S1(q) if 0 ≤ S1(q) ≤ H11 and xc'(q) ≥ 0
    0 otherwise
}
y2(q) := sin(q)*l1
# Составление уравнения Лагранжа
J(q) := Jp*(ωeng/ω)^2 + Jpm(q) + J1(q) + m2*((d/dq(x2(q)))^2 + (d/dq(y2(q)))^2) + J3(q)*(d/dq(phi3(q)))^2 + m3(q)*((d/dq(x3(q)))^2 + (d/dq(y3(q)))^2) + m4*((d/dq(x4(q)))^2 + ((d/dq(y4(q)))^2))
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# Среднее значение приведённого момента инерции
J0 := sum(J(q), q)/n = 13.611
# 3. Определить приведённый момент сопротивления, построить график
Qc(q) := P(q)*xc'(q) - G3(q)*(d/dq(y3(q))) - G2(q)*(d/dq(y2(q)))
# Среднее значения приведённого момента сопротивления
Qc0 := sum(Qc(q), q)/n = -19.771
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# 4. Найти нулевые приближения ω0 и Q0
Q0 := -Qc0 = 19.771
ω0 := -(Q0 - i*s*ωxx)/(s*i^2) = 15.4653
# 5. Разложить в ряд возмущающий момент L(q), перейти ко времени, построить L(t)
L(q) := -1/2*(d/dq(J(q)))*ω0^2 + Qc(q) - Qc0
k := 1 .. 5
q := 0, 2*π/n .. 2*π - 2*π/n
Lc[k] := 2/n*sum(L(q)*cos(k*q), q)
Ls[k] := 2/n*sum(L(q)*sin(k*q), q)
Ld(q) := sum(Lc[k]*cos(k*q) + Ls[k]*sin(k*q), k)
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LA[k] := sqrt(Lc[k]^2 + Ls[k]^2)
α[k] := angle(Lc[k], Ls[k])
Lf(q) := sum(LA[k]*cos(k*q - α[k]), k)
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# 6. Определить динамическую ошибку по ψ`(t)
T := 2*π/ω0 = 0.406276
t := 0, T/100 .. T
τm := J0/s = 0.00864415
D1(p) := s*(τm*τ*p^2 + τm*p + 1)
W1(p) := (τ*p + 1)/D1(p)
j := sqrt(-1)
ψ'(t) := sum(LA[k]*|W1(j*k*ω0)|*cos(k*ω0*t - α[k] + arg(W1(j*ω0*k))), k)
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# Были найдены точки, в которых функция принимает максимальное и минимальное значения
q1 := 0.33
qmax := Maximize(ψ', q1) = 0.340499
ψ'max := ψ'(qmax) = 2.97164
q2 := 0.4
qmin := Minimize(ψ', q2) = 0.396259
ψ'min := ψ'(qmin) = -2.13418
δ := (ψ'max - ψ'min)/ω0*100 = 33.0147
W2(p) := -s/D1(p)
μ(t) := sum(LA[k]*|W2(j*k*ω0)|*cos(k*ω0*t - α[k] + arg(W2(j*ω0*k))), k)
Qd(t) := Q0 + μ(t)
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Jd := Jp*i^2 + Jpm(q)
τd := Jd/s = 0.00678981
Jmm := 0  # Без маховика
τm := (J0 + Jmm)/s
W3(p) := (τd*τ*p^2 + τd*p + 1)/(τm*τ*p^2 + τm*p + 1)
Mп(t) := Qc0 + sum(LA[k]*|W3(j*k*ω0)|*cos(k*ω0*t - α[k] + arg(W3(j*ω0*k))), k)
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Qc0 = -19.771
# 7. Оценить динамические характеристики машины
# 7.1. Поставить маховик на вал машины. Увеличивая Jmm, добиться коэффициента неравномерности вращения<10%
# Mомент проверяется только на знакопостоянство, он должен быть меньше нуля
# Вы должны задать и изменять момент инерции маховика,пока δ не станет меньше 10%,
# а потом рассчитать его радиус.Я сначала задала
# 100, а потом уменьшала
Jmm := 38
J0 = 13.611
τm := (J0 + Jmm)/s
D1(p) := s*(τm*τ*p^2 + τm*p + 1)
W1(p) := (τ*p + 1)/D1(p)
j := sqrt(-1)
ψ'(t) := sum(LA[k]*|W1(j*k*ω0)|*cos(k*ω0*t - α[k] + arg(W1(j*ω0*k))), k)
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# Были найдены точки, в которых функция принимает максимальное и минимальное значения
q1 := 0.35
qmax := Maximize(ψ', q1) = 0.364286
ψ'max := ψ'(qmax) = 0.757449
q2 := 0.3
qmin := Minimize(ψ', q2) = 0.297206
ψ'min := ψ'(qmin) = -0.782389
δ := (ψ'max - ψ'min)/ω0*100 = 9.95671
# Вот результат. Потом рассчитываем радиус
ρ := 7800
Rmm := nthroot(Jmm/(0.1*π*ρ), 5) = 0.434618
# Дальше строим графики движущего и крутящего моментов, и смотрим
# будет ли Мп меньше 0
W2(p) := -s/D1(p)
μ(t) := sum(LA[k]*|W2(j*k*ω0)|*cos(k*ω0*t - α[k] + arg(W2(j*ω0*k))), k)
Qd(t) := Q0 + μ(t)
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Jd := Jp*i^2 + Jpm(q)
τd := Jd/s = 0.00678981
τm := (J0 + Jmm)/s
s = 1574.59
W3(p) := (τd*τ*p^2 + τd*p + 1)/(τm*τ*p^2 + τm*p + 1)
Mп(t) := Qc0 + sum(LA[k]*|W3(j*k*ω0)|*cos(k*ω0*t - α[k] + arg(W3(j*ω0*k))), k)
Qc0 = -19.771
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# Не стал. Возвращаемся вверх и увеличиваем Jmm до тех пор,
# пока момент не уйдет ниже нулевой линии. Это будет нереальный маховик, но это надо показать. Потом убираем маховик с вала машины Jmm=0, и ставим Jmd на вал двигателя и т.д. Пишите, не прощаюсь.
# 7.2. Увеличить Jmm и добиться Мп<0
Jmm := 660
J0 = 13.611
τm := (J0 + Jmm)/s
D1(p) := s*(τm*τ*p^2 + τm*p + 1)
W1(p) := (τ*p + 1)/D1(p)
j := sqrt(-1)
ψ'(t) := sum(LA[k]*|W1(j*k*ω0)|*cos(k*ω0*t - α[k] + arg(W1(j*ω0*k))), k)
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# Были найдены точки, в которых функция принимает максимальное и минимальное значения
q1 := 0.35
qmax := Maximize(ψ', q1) = 0.37222
ψ'max := ψ'(qmax) = 0.0265228
q2 := 0.3
qmin := Minimize(ψ', q2) = 0.303944
ψ'min := ψ'(qmin) = -0.0572375
δ := (ψ'max - ψ'min)/ω0*100 = 0.5416
# Вот результат. Потом рассчитываем радиус
ρ := 7800
Rmm := nthroot(Jmm/(0.1*π*ρ), 5) = 0.769237
# Дальше строим графики движущего и крутящего моментов, и смотрим
# будет ли Мп меньше 0
W2(p) := -s/D1(p)
μ(t) := sum(LA[k]*|W2(j*k*ω0)|*cos(k*ω0*t - α[k] + arg(W2(j*ω0*k))), k)
Qd(t) := Q0 + μ(t)
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Jd := Jp*i^2 + Jpm(q)
τd := Jd/s = 0.00678981
τm := (J0 + Jmm)/s
s = 1574.59
W3(p) := (τd*τ*p^2 + τd*p + 1)/(τm*τ*p^2 + τm*p + 1)
Mп(t) := Qc0 + sum(LA[k]*|W3(j*k*ω0)|*cos(k*ω0*t - α[k] + arg(W3(j*ω0*k))), k)
Qc0 = -19.771
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# Не стал. Возвращаемся вверх и увеличиваем Jmm до тех пор,
# пока момент не уйдет ниже нулевой линии. Это будет нереальный маховик, но это надо показать. Потом убираем маховик с вала машины Jmm=0, и ставим Jmd на вал двигателя и т.д. Пишите, не прощаюсь.
# 7.3. Убрать маховик на валу машины и поставить на вал двигателя
Jmm := 0
Jmd := 100
J0 = 13.611
τd := (Jd + Jmd*i^2)/s = 1.9878
τm := (J0 + Jmm)/s = 0.00864415
D1(p) := s*(τm*τ*p^2 + τm*p + 1)
W1(p) := (τ*p + 1)/D1(p)
j := sqrt(-1)
ψ'(t) := sum(LA[k]*|W1(j*k*ω0)|*cos(k*ω0*t - α[k] + arg(W1(j*ω0*k))), k)
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# Были найдены точки, в которых функция принимает максимальное и минимальное значения
q1 := 0.35
qmax := Maximize(ψ', q1) = 0.340499
ψ'max := ψ'(qmax) = 2.97164
q2 := 0.4
qmin := Minimize(ψ', q2) = 0.396259
ψ'min := ψ'(qmin) = -2.13418
δ := (ψ'max - ψ'min)/ω0*100 = 33.0147
# Вот результат. Потом рассчитываем радиус
ρ := 7800
Rmm := nthroot(Jmd/(0.1*π*ρ), 5) = 0.527413
# Дальше строим графики движущего и крутящего моментов, и смотрим
# будет ли Мп меньше 0
W2(p) := -s/D1(p)
μ(t) := sum(LA[k]*|W2(j*k*ω0)|*cos(k*ω0*t - α[k] + arg(W2(j*ω0*k))), k)
Qd(t) := Q0 + μ(t)
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s = 1574.59
W3(p) := (τd*τ*p^2 + τd*p + 1)/(τm*τ*p^2 + τm*p + 1)
Mп(t) := Qc0 + sum(LA[k]*|W3(j*k*ω0)|*cos(k*ω0*t - α[k] + arg(W3(j*ω0*k))), k)
Qc0 = -19.771
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# 7.4. Подобрать коэффициент усиления K0. Построить графики
Jmm := 0
Jmd := 0
K0 := 13
Wос := -K0
r := sd*i*ωxx/220 = 110.692
W4(p) := (τ*p + 1)/(D1(p) + K0*r)
Wp(p) := r*K0/(s*(τm*(τ*p)^2 + τm*p + 1))  # Не понял из конспекта, зачем это искать)
ψ'1(t) := sum(LA[k]*|W4(j*k*ω0)|*cos(k*ω0*t - α[k] + arg(W4(j*ω0*k))), k)
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q1 := 0.35
qmax := Maximize(ψ', q1) = 0.340499
ψ'1max := ψ'1(qmax) = 1.22776
q2 := 0.4
qmin := Minimize(ψ', q2) = 0.396259
ψ'1min := ψ'1(qmin) = -0.259622
δ := (ψ'1max - ψ'1min)/ω0*100 = 9.61752
W5(p) := (s - J0*p*r*Wос*W4(p))/D1(p)
μ1(t) := sum(LA[k]*|W5(j*k*ω0)|*cos(k*ω0*t - α[k] + arg(W5(j*ω0*k))), k)
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Mп1(t) := Qc0 - μ1(t) + Jd*(d/dt(ψ'1(t)))
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